// SBML level 1 version 2

model model()

  // Compartments:
  compartment univ = 1;

  // Species:
  species DNA3 in univ = 1/univ;
  species DNA4 in univ = 1/univ;
  species DNA80 in univ = 1/univ;
  species G3D_G80D in univ = 0;
  species G3D_free in univ = 0;
  species G3_RNA in univ = 0;
  species G3_protein in univ = 0;
  species G4D_DNA3 in univ = 0;
  species G4D_DNA4 in univ = 0;
  species G4D_DNA80 in univ = 0;
  species G4D_free in univ = 0;
  species G4_RNA in univ = 0;
  species G4_protein in univ = 10/univ;
  species G80D_G4D_DNA3 in univ = 0;
  species G80D_G4D_DNA4 in univ = 0;
  species G80D_G4D_DNA80 in univ = 0;
  species G80D_free in univ = 0;
  species G80_RNA in univ = 0;
  species G80_protein in univ = 0;
  species galactose in univ = 1/univ;

  // Parameters:
  kf = 1;
  kr = 0.1;
  kt = 1;
  ktrans = 0.1;
  numViewPoints = 50;
  startTime = 0;
  stopTime = 200;

  // Reactions:
  G3D_G80D_complexing: G80D_free + G3D_free => G3D_G80D; G3D_G80D_complexing___RATE__*G80D_free*G3D_free;
    G3D_G80D_complexing___RATE__ = 1;
  G3D_G80D_decomplexing: G3D_G80D => G80D_free + G3D_free; G3D_G80D_decomplexing___RATE__*G3D_G80D;
    G3D_G80D_decomplexing___RATE__ = 0.1;
  G3_dedimerization: G3D_free => 2 G3_protein; G3_dedimerization___RATE__*G3D_free;
    G3_dedimerization___RATE__ = 0.1;
  G3_dimerization: 2 G3_protein => G3D_free; G3_dimerization___RATE__*G3_protein^2;
    G3_dimerization___RATE__ = 1;
  G3_transcription: galactose + G4D_DNA3 => G3_RNA + galactose + G4D_DNA3; G3_transcription___RATE__*galactose*G4D_DNA3;
    G3_transcription___RATE__ = 1;
  G3_translation: G3_RNA => G3_protein; G3_translation___RATE__*G3_RNA;
    G3_translation___RATE__ = 0.05;
  G4_dedimerization: G4D_free => 2 G4_protein; G4_dedimerization___RATE__*G4D_free;
    G4_dedimerization___RATE__ = 0.1;
  G4_dimer_binding_at_DNA3: DNA3 + G4D_free => G4D_DNA3; G4_dimer_binding_at_DNA3___RATE__*DNA3*G4D_free;
    G4_dimer_binding_at_DNA3___RATE__ = 1;
  G4_dimer_binding_at_DNA4: DNA4 + G4D_free => G4D_DNA4; G4_dimer_binding_at_DNA4___RATE__*DNA4*G4D_free;
    G4_dimer_binding_at_DNA4___RATE__ = 1;
  G4_dimer_binding_at_DNA80: G4D_free + DNA80 => G4D_DNA80; G4_dimer_binding_at_DNA80___RATE__*G4D_free*DNA80;
    G4_dimer_binding_at_DNA80___RATE__ = 1;
  G4_dimer_debinding_at_DNA3: G4D_DNA3 => DNA3 + G4D_free; G4_dimer_debinding_at_DNA3___RATE__*G4D_DNA3;
    G4_dimer_debinding_at_DNA3___RATE__ = 0.1;
  G4_dimer_debinding_at_DNA4: G4D_DNA4 => DNA4 + G4D_free; G4_dimer_debinding_at_DNA4___RATE__*G4D_DNA4;
    G4_dimer_debinding_at_DNA4___RATE__ = 0.1;
  G4_dimer_debinding_at_DNA80: G4D_DNA80 => G4D_free + DNA80; G4_dimer_debinding_at_DNA80___RATE__*G4D_DNA80;
    G4_dimer_debinding_at_DNA80___RATE__ = 0.1;
  G4_dimerization: 2 G4_protein => G4D_free; G4_dimerization___RATE__*G4_protein^2;
    G4_dimerization___RATE__ = 1;
  G4_transcription: G4D_DNA4 => G4_RNA + G4D_DNA4; G4_transcription___RATE__*G4D_DNA4;
    G4_transcription___RATE__ = 1;
  G4_translation: G4_RNA => G4_protein; G4_translation___RATE__*G4_RNA;
    G4_translation___RATE__ = 0.1;
  G80_dedimerization: G80D_free => 2 G80_protein; G80_dedimerization___RATE__*G80D_free;
    G80_dedimerization___RATE__ = 0.1;
  G80_dimer_binding_at_DNA3: G80D_free + G4D_DNA3 => G80D_G4D_DNA3; G80_dimer_binding_at_DNA3___RATE__*G80D_free*G4D_DNA3;
    G80_dimer_binding_at_DNA3___RATE__ = 1;
  G80_dimer_binding_at_DNA4: G80D_free + G4D_DNA4 => G80D_G4D_DNA4; G80_dimer_binding_at_DNA4___RATE__*G80D_free*G4D_DNA4;
    G80_dimer_binding_at_DNA4___RATE__ = 1;
  G80_dimer_binding_at_DNA80: G80D_free + G4D_DNA80 => G80D_G4D_DNA80; G80_dimer_binding_at_DNA80___RATE__*G80D_free*G4D_DNA80;
    G80_dimer_binding_at_DNA80___RATE__ = 1;
  G80_dimer_debinding_at_DNA3: G80D_G4D_DNA3 => G80D_free + G4D_DNA3; G80_dimer_debinding_at_DNA3___RATE__*G80D_G4D_DNA3;
    G80_dimer_debinding_at_DNA3___RATE__ = 0.1;
  G80_dimer_debinding_at_DNA4: G80D_G4D_DNA4 => G80D_free + G4D_DNA4; G80_dimer_debinding_at_DNA4___RATE__*G80D_G4D_DNA4;
    G80_dimer_debinding_at_DNA4___RATE__ = 0.1;
  G80_dimer_debinding_at_DNA80: G80D_G4D_DNA80 => G80D_free + G4D_DNA80; G80_dimer_debinding_at_DNA80___RATE__*G80D_G4D_DNA80;
    G80_dimer_debinding_at_DNA80___RATE__ = 0.1;
  G80_dimerization: 2 G80_protein => G80D_free; G80_dimerization___RATE__*G80_protein^2;
    G80_dimerization___RATE__ = 1;
  G80_transcription: G4D_DNA80 => G80_RNA + G4D_DNA80; G80_transcription___RATE__*G4D_DNA80;
    G80_transcription___RATE__ = 1;
  G80_translation: G80_RNA => G80_protein; G80_translation___RATE__*G80_RNA;
    G80_translation___RATE__ = 0.05;
  create_galactose: => galactose; 10.0*(exp((-20.0*(time-startTime))/(stopTime-startTime)));
  destroy_galactose: galactose => ; destroy_galactose___RATE__*galactose;
    destroy_galactose___RATE__ = 0.1;

  // Unit definitions:
  unit volume = dimensionless;
  unit substance = item;
end
